** MaterialSelect AI - cartao de material para Abaqus (.inp, *MATERIAL)
**
** ATENCAO: este cartao contem valores marcados como demonstrativos, que sao
** ficticios. Nao utilizar em projetos reais.
** Esta ferramenta destina-se a apoio didatico e a triagem preliminar de
** candidatos. Nao substitui validacao experimental, analise estrutural
** detalhada nem julgamento de engenharia.
** Cartao de material para pre-processamento CAE. Os valores sao pontos
** representativos de catalogo, independentes de temperatura, sem curvas de
** plasticidade, fadiga ou fluencia. Propriedade nao cadastrada foi omitida,
** nunca preenchida com zero nem com valor padrao. Confira cada valor e o
** sistema de unidades antes de usar o cartao num modelo.
**
** Material: Liga Ficticia CAE-1 (demonstracao) (id 901; classe Metais)
** MATERIAL FICTICIO: dado de demonstracao, valores inventados para ensino. Nao
** usar em projeto real.
** Designacoes: sem designacao cadastrada
** Composicao quimica (% em massa): sem composicao cadastrada
** Composicao e designacoes sao informativas: nenhum campo do cartao as le.
** Sistema de unidades: SI mm-t-s (mm, t, s, N, MPa, K)
** Unidades base: comprimento mm, massa t (tonelada), tempo s, forca N, tensao
** MPa, temperatura K
** Valores convertidos da unidade canonica do catalogo pelo Pint.
**
** Propriedades (valor completo; um campo de largura fixa pode arredondar):
** densidade [*DENSITY] = 7.85E-09 t*mm^-3; qualidade: ESTIMADO; fonte: Fonte
** ficticia de teste CAE (FICTICIA, demonstracao); licenca: Dado ficticio de
** demonstracao
** modulo de Young [*ELASTIC (E)] = 210000. MPa; qualidade: ESTIMADO; fonte:
** Fonte ficticia de teste CAE (FICTICIA, demonstracao); licenca: Dado ficticio
** de demonstracao
** faixa cadastrada 200000. a 220000. MPa: exportado o ponto representativo da
** faixa
** coeficiente de Poisson [*ELASTIC (nu)] = 0.3 adimensional; qualidade:
** ESTIMADO; fonte: Fonte ficticia de teste CAE (FICTICIA, demonstracao);
** licenca: Dado ficticio de demonstracao
** coeficiente de expansao termica [*EXPANSION] = 1.2E-05 K^-1; qualidade:
** ESTIMADO; fonte: Fonte ficticia de teste CAE (FICTICIA, demonstracao);
** licenca: Dado ficticio de demonstracao
** condutividade termica [*CONDUCTIVITY] = 50. mW*mm^-1*K^-1; qualidade:
** ESTIMADO; fonte: Fonte ficticia de teste CAE (FICTICIA, demonstracao);
** licenca: Dado ficticio de demonstracao
** calor especifico [*SPECIFIC HEAT] = 460000000. mJ*t^-1*K^-1; qualidade:
** ESTIMADO; fonte: Fonte ficticia de teste CAE (FICTICIA, demonstracao);
** licenca: Dado ficticio de demonstracao
*MATERIAL, NAME=Liga_Ficticia_CAE-1_demonstracao
*ELASTIC, TYPE=ISOTROPIC
210000., 0.3
*DENSITY
7.85E-09
*EXPANSION, TYPE=ISO
1.2E-05
*CONDUCTIVITY, TYPE=ISO
50.
*SPECIFIC HEAT
460000000.
