! MaterialSelect AI - cartao de material para Ansys MAPDL (comandos MP)
!
! ATENCAO: este cartao contem valores marcados como demonstrativos, que sao
! ficticios. Nao utilizar em projetos reais.
! Esta ferramenta destina-se a apoio didatico e a triagem preliminar de
! candidatos. Nao substitui validacao experimental, analise estrutural detalhada
! nem julgamento de engenharia.
! Cartao de material para pre-processamento CAE. Os valores sao pontos
! representativos de catalogo, independentes de temperatura, sem curvas de
! plasticidade, fadiga ou fluencia. Propriedade nao cadastrada foi omitida,
! nunca preenchida com zero nem com valor padrao. Confira cada valor e o sistema
! de unidades antes de usar o cartao num modelo.
!
! Material: Liga Ficticia CAE-1 (demonstracao) (id 901; classe Metais)
! MATERIAL FICTICIO: dado de demonstracao, valores inventados para ensino. Nao
! usar em projeto real.
! Designacoes: sem designacao cadastrada
! Composicao quimica (% em massa): sem composicao cadastrada
! Composicao e designacoes sao informativas: nenhum campo do cartao as le.
! Sistema de unidades: SI mm-t-s (mm, t, s, N, MPa, K)
! Unidades base: comprimento mm, massa t (tonelada), tempo s, forca N, tensao
! MPa, temperatura K
! Valores convertidos da unidade canonica do catalogo pelo Pint.
!
! Propriedades (valor completo; um campo de largura fixa pode arredondar):
! densidade [DENS] = 7.85E-09 t*mm^-3; qualidade: ESTIMADO; fonte: Fonte
! ficticia de teste CAE (FICTICIA, demonstracao); licenca: Dado ficticio de
! demonstracao
! modulo de Young [EX] = 210000. MPa; qualidade: ESTIMADO; fonte: Fonte ficticia
! de teste CAE (FICTICIA, demonstracao); licenca: Dado ficticio de demonstracao
! faixa cadastrada 200000. a 220000. MPa: exportado o ponto representativo da
! faixa
! coeficiente de Poisson [PRXY] = 0.3 adimensional; qualidade: ESTIMADO; fonte:
! Fonte ficticia de teste CAE (FICTICIA, demonstracao); licenca: Dado ficticio
! de demonstracao
! coeficiente de expansao termica [ALPX] = 1.2E-05 K^-1; qualidade: ESTIMADO;
! fonte: Fonte ficticia de teste CAE (FICTICIA, demonstracao); licenca: Dado
! ficticio de demonstracao
! condutividade termica [KXX] = 50. mW*mm^-1*K^-1; qualidade: ESTIMADO; fonte:
! Fonte ficticia de teste CAE (FICTICIA, demonstracao); licenca: Dado ficticio
! de demonstracao
! calor especifico [C] = 460000000. mJ*t^-1*K^-1; qualidade: ESTIMADO; fonte:
! Fonte ficticia de teste CAE (FICTICIA, demonstracao); licenca: Dado ficticio
! de demonstracao
!
! Troque MATID se o numero 1 ja estiver em uso no seu modelo.
! ALPX e o coeficiente secante; a temperatura de referencia (TREF ou MP,REFT) e
! parametro do modelo, nao do material, e nao e definida aqui.
/UNITS,MPA
MATID=1
MP,DENS,MATID,7.85E-09
MP,EX,MATID,210000.
MP,PRXY,MATID,0.3
MP,ALPX,MATID,1.2E-05
MP,KXX,MATID,50.
MP,C,MATID,460000000.
